echo both

atom_style      granular
atom_modify     map array
boundary        p f f
newton          off
communicate     single vel yes
units           si

region          domain block -0.06 0.06 -0.06 0.06 -0.01 0.16 units box
create_box      1 domain

neighbor        0.002 bin
neigh_modify    delay 0

fix             m1 all property/global youngsModulus peratomtype 1.e7
fix             m2 all property/global poissonsRatio peratomtype 0.30
fix             m3 all property/global coefficientRestitution peratomtypepair 1 0.2
fix             m4 all property/global coefficientFriction peratomtypepair 1 0.5

pair_style      gran model hertz tangential history
pair_coeff      * *
timestep        1.0e-5

fix             overhang_mesh all mesh/surface file ../../../examples/LIGGGHTS/Tutorials_public/mesh_inclusion_insert/meshes/cylinder_closed.stl type 1 scale 1.0 move 0.08 0.0 0.0
fix             overhang_wall all wall/gran model hertz tangential history mesh n_meshes 1 meshes overhang_mesh

run             0

variable        natoms equal atoms
print           "TEST_METRIC natoms=${natoms}"
